# ENGENHARIA DE CONTROLE E AUTOMAÇÃO
# CONTROLE II - 2020.1
#
# SYLVIELLY SOUSA | 20162045070410
# Capítulo 03 - Sinais Amostrados
# Cálculo da função de transferência de m(t)/e(t) do amostrador analógico
Capacitor
v_c(t) := (1/C)*integral(i(τ), τ = 0 .. t)  # error: bad_variable mc_i mc_i value_zone  # aplicando Laplace:
V_c(s) := (1/(C*s))*I(s)  # error: bad_variable mc_I mc_I value_zone
Indutor
v_L(t) := L*(d/dt(i(t)))  # error: bad_variable mc_i mc_i value_zone  # aplicando Laplace:
V_L(s) := L*s*I(s)  # error: bad_variable mc_I mc_I value_zone
Resistor
v_R(t) := R*i(t)  # error: bad_variable mc_i mc_i value_zone
# aplicando Laplcace
V_R(s) := R*I(s)  # error: bad_variable mc_I mc_I value_zone
# Para chave fechada, t = 1
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# Aplicando LTK para malha 1:
-E(s) + R_i*I_1(s) + (1/(C*s))*(I_1(s) - I_2(s)) := 0  # disabled
-E(s) + R_i*I_1(s) + (1/(C*s))*I_1(s)*_(1/(C*s))*I_2(s) := 0  # disabled
R_i*(1/(C*s))*I_1(s) - (1/(C*s))*I_2(s) := E(s)  # disabled  # eq_1
# Aplicando LTK para malha 2:
(1/(C*s))*(I_2(s) - I_1(s)) + R_o*I_2(s) := 0  # disabled
(-1/(C*s))*I_1(s) + (1/(C*s))*I_2(s) + R_o*I_2(s) := 0  # disabled
(-1/(C*s))*I_1(s) + (R_o + 1/(C*s))*I_2(s) := 0  # disabled  # eq_2
Δ := [R_i + 1/(C*s), -1/(C*s); -1/(C*s), R_o + 1/(C*s)]  # error: bad_variable mc_R_2E_i mc_R_2E_i value_zone
□ := [E(s); 0]  # error: bad_placeholder
Δ_1 := [E(s), -1/(C*s); 0, R_o + 1/(C*s)]  # error: bad_variable mc_E mc_E value_zone
I_1(s) := Δ_1/Δ  # error: bad_variable
I_1(s) := E(s)*(R_o + 1/(C*s))/((R_i*R_o) + (1/(C*s))*(R_i + R_o))  # error: bad_variable mc_E mc_E value_zone
Δ_2 := [R_i + 1/(C*s), E(s); -1/(C*s), 0]  # error: bad_variable mc_R_2E_i mc_R_2E_i value_zone
I_2(s) := Δ_2/Δ  # error: bad_variable
I_2(s) := E(s)/(C*s)/((R_i*R_o) + (1/(C*s))*(R_i + R_o))  # error: bad_variable mc_E mc_E value_zone
M(s) := R_o*I_2(s)  # error: bad_variable
M(s) := R_o*(E(s)/(C*s)/((R_i*R_o) + (1/(C*s))*(R_i + R_o)))  # error: bad_variable mc_R_2E_o mc_R_2E_o value_zone
M(s)/(E(s)/(C*s)) := (R_o/((R_i*R_o) + (1/(C*s))*(R_i + R_o)))  # error: bad_identifier
M(s)*C*s/E(s) := (R_o/((R_i*R_o) + (1/(C*s))*(R_i + R_o)))  # error: bad_identifier
M(s)/E(s) := (1/(C*s))*(R_o/((R_i*R_o) + (1/(C*s))*(R_i + R_o)))  # error: bad_identifier
M(s)/E(s) := (R_o/(R_o*R_i*C*s + R_i + R_o))  # disabled
G(s) := M(s)/E(s)  # error: bad_variable
