# ENGENHARIA DE CONTROLE E AUTOMAÇÃO
# CONTROLE II - 2020.1
#
# SYLVIELLY SOUSA | 20162045070410
# Capítulo 06 - Simulação de Sistemas Lineares
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R_in(s) := 1/(s + 1)
G_p(s) := 1/(s*(s + 1))
G_h(s) := (1 - e^(s*T))/s
PID(z) := (K_p + (K_i/(1 - z^-1)) + K_d*(1 - z^-1))  # error: bad_variable mc_K_2E_p mc_K_2E_p value_zone
R_in(z) := z/(z - e^(-T))  # error: bad_dimensions Unitless Magnetic Flux Density
F_o(z) := (0.5151*z^3 - 0.1452*z^2 - 0.2963*z + 0.0528)/(z^4 - 1.8528*z^3 + 1.5906*z^2 + 0.6642*z + 0.0528)
C_out(z) := F_o(z)*R_in(z)  # error: bad_variable
C_out(z) → (.5151*z^3 - .1452*z^2 - .2963*z + 0.0528)/(z^4 - 1.8528*z^3 + 1.5906*z^2 + .6642*z + 0.0528)*z/(z - e^(-T))
E(z) := R_in(z) - C_out(z)  # error: bad_variable
E(z) → z/(z - e^(-T)) - (.5151*z^3 - .1452*z^2 - .2963*z + 0.0528)/(z^4 - 1.8528*z^3 + 1.5906*z^2 + .6642*z + 0.0528)*z/(z - e^(-T))
